OpenVSP model (file version 5), 7 components.
Geometry view with OpenVSP parameter names; values to 6 digits, angles in degrees, lengths in the model's unit.
Overall bounding box: X_Min=-2.00243 X_Len=33.0024 Y_Min=-26.8592 Y_Len=53.7184 Z_Min=-1.33333 Z_Len=9.69378

Wing "Canard"
  location (X Y Z) -2 0 0, rotation 0 0 0
  symmetric about XZ
  bounding box size 2.66909 20 0.48123
  totals: TotalSpan=20 TotalProjectedSpan=20 TotalChord=2.66667 TotalArea=53.3333 TotalAR=7.5
  root: chord 2.66667, twist 0, NACA 5-digit CamberLoc=0.15 IdealCl=0.23 ThickChord=0.18
  sections:
    n  Span  Root_Chord  Tip_Chord  Area     Sweep  Sweep_Location  Dihedral  Twist  Twist_Location  tip airfoil
    1  10    2.66667     2.66667    26.6667  0      0               0         0      0.25            as above

Wing "Canard Winglet"
  location (X Y Z) -2 9.9 0, rotation 45 0 0
  symmetric about XZ
  bounding box size 2.66667 21.3841 0.961982
  totals: TotalSpan=2 TotalProjectedSpan=2 TotalChord=2 TotalArea=4 TotalAR=1
  root: chord 2.66667, twist 0, NACA 4-series Camber=0 CamberLoc=0.2 ThickChord=0.18
  sections:
    n  Span  Root_Chord  Tip_Chord  Area  Sweep  Sweep_Location  Dihedral  Twist  Twist_Location  tip airfoil
    1  1     2.66667     1.33333    2     30     0               0         0      0.25            as above

Wing "Main Winglet"
  location (X Y Z) 13.7245 25.8032 2.26299, rotation 90 0 0
  symmetric about XZ
  bounding box size 4.07251 53.7184 3.34602
  totals: TotalSpan=6.92811 TotalProjectedSpan=6.69204 TotalChord=3.05161 TotalArea=21.1419 TotalAR=2.11823
  root: chord 4.06881, twist 0, NACA 5-digit CamberLoc=0.15 IdealCl=0.23 ThickChord=0.18
  sections:
    n  Span     Root_Chord  Tip_Chord  Area     Sweep  Sweep_Location  Dihedral  Twist  Twist_Location  tip airfoil
    1  3.46405  4.06881     2.0344     10.5709  30     0               -15       0      0.25            as above

Stack "Twin booom"
  location (X Y Z) 10 8 1, rotation 0 0 0
  symmetric about XZ
  bounding box size 18 17 1
  cross sections:
    n  XDelta    YDelta  ZDelta  shape
    0  0         0       0       point
    1  0.666667  0       0       circle Circle_Diameter=1
    2  16.6667   0       0       as above
    3  0.666667  0       0       point

Wing "Twin Vstab Tail", child of "Twin booom"
  location (X Y Z) 24.6667 8 -1.33333, rotation 90 0 0
  symmetric about XZ
  bounding box size 6.349 16.9011 9.33333
  totals: TotalSpan=18.6667 TotalProjectedSpan=18.6667 TotalChord=3.90278 TotalArea=71.6296 TotalAR=4.86453
  root: chord 3.11111, twist 0, NACA 4-series Camber=0 CamberLoc=0.2 ThickChord=0.18
  sections:
    n  Span     Root_Chord  Tip_Chord  Area     Sweep  Sweep_Location  Dihedral  Twist  Twist_Location  tip airfoil
    1  2.66667  3.11111     5          10.8148  -30    0               0         0      0.25            as above
    2  6.66667  5           2.5        25       30     0               0         0      0.25            as above
  SS_Rectangle "SS_RECT_0": Center_U=0.6 Center_W=0.117073 U_Length=0.15 W_Length=0.2

Wing "H Stab", child of "Twin Vstab Tail"
  location (X Y Z) 27 0 8, rotation 0 0 0
  symmetric about XZ
  bounding box size 4 16 0.720895
  totals: TotalSpan=16 TotalProjectedSpan=16 TotalChord=4 TotalArea=64 TotalAR=4
  root: chord 4, twist 0, NACA 4-series Camber=0 CamberLoc=0.2 ThickChord=0.18
  sections:
    n  Span  Root_Chord  Tip_Chord  Area  Sweep  Sweep_Location  Dihedral  Twist  Twist_Location  tip airfoil
    1  8     4           4          32    0      0               0         0      0.25            as above
  SS_Rectangle "SS_RECT_0": Center_U=0.480392 Center_W=1 U_Length=0.308824 W_Length=0.612745

Wing "Main Wing"
  location (X Y Z) 9.33333 0 0.667, rotation 0 0 0
  symmetric about XZ
  bounding box size 8.59505 52 2.40716
  totals: TotalSpan=52.0714 TotalProjectedSpan=52 TotalChord=6 TotalArea=312.428 TotalAR=8.65479
  root: chord 8, twist 0, NACA 5-digit CamberLoc=0.15 IdealCl=0.25 ThickChord=0.18
  sections:
    n  Span     Root_Chord  Tip_Chord  Area     Sweep  Sweep_Location  Dihedral  Twist  Twist_Location  tip airfoil
    1  26.0357  8           4          156.214  10     0               3         -3     0.25            as above
  SS_Rectangle "SS_RECT_0": Center_U=0.55122 Center_W=0.9 U_Length=0.2 W_Length=0.2
