OpenVSP model (file version 5), 33 components.
Geometry view with OpenVSP parameter names; values to 6 digits, angles in degrees, lengths in the model's unit.
Overall bounding box: X_Min=0.000333333 X_Len=37.6667 Y_Min=-26.8641 Y_Len=53.7282 Z_Min=-6.60171 Z_Len=26.2687

Wing "Canard"
  location (X Y Z) 4.667 0 -1.333, rotation 0 0 0
  symmetric about XZ
  bounding box size 3 20 0.360163
  totals: TotalSpan=20 TotalProjectedSpan=20 TotalChord=3 TotalArea=60 TotalAR=6.66667
  root: chord 3, twist 0, NACA 4-series Camber=0 CamberLoc=0.2 ThickChord=0.12
  sections:
    n  Span  Root_Chord  Tip_Chord  Area  Sweep  Sweep_Location  Dihedral  Twist  Twist_Location  tip airfoil
    1  10    3           3          30    0      0               0         0      0.25            NACA 4-series Camber=0 CamberLoc=0.2 ThickChord=0.1

Fuselage "Fuselage"
  location (X Y Z) 0.000333333 0 0.000333333, rotation 0 0 0
  bounding box size 30 6 8.48685
  Design: Length=30
  cross sections:
    n  XLocPercent  YLocPercent  YRotate  ZLocPercent  shape
    0  0            0            0        -0.025       point
    1  0.5          0            -15      -0.0075      ellipse Ellipse_Height=6 Ellipse_Width=6
    2  1            0            0        0            point

Wing "Canard Winglet"
  location (X Y Z) 4.667 9.9 -1.333, rotation 45 0 0
  symmetric about XZ
  bounding box size 2.66667 21.3085 0.867463
  totals: TotalSpan=2 TotalProjectedSpan=2 TotalChord=2 TotalArea=4 TotalAR=1
  root: chord 2.66667, twist 0, NACA 4-series Camber=0 CamberLoc=0.2 ThickChord=0.12
  sections:
    n  Span  Root_Chord  Tip_Chord  Area  Sweep  Sweep_Location  Dihedral  Twist  Twist_Location  tip airfoil
    1  1     2.66667     1.33333    2     30     0               0         0      0.25            NACA 4-series Camber=0 CamberLoc=0.2 ThickChord=0.1

Wing "Main Winglet"
  location (X Y Z) 17.8915 25.8032 0.929993, rotation 90 0 0
  symmetric about XZ
  bounding box size 4.06881 53.6031 3.34602
  totals: TotalSpan=6.92811 TotalProjectedSpan=6.69204 TotalChord=3.05161 TotalArea=21.1419 TotalAR=2.11823
  root: chord 4.06881, twist 0, NACA 4-series Camber=0 CamberLoc=0.2 ThickChord=0.12
  sections:
    n  Span     Root_Chord  Tip_Chord  Area     Sweep  Sweep_Location  Dihedral  Twist  Twist_Location  tip airfoil
    1  3.46405  4.06881     2.0344     10.5709  30     0               -15       0      0.25            NACA 4-series Camber=0 CamberLoc=0.2 ThickChord=0.1

Stack "LG front"
  location (X Y Z) 6.267 0.5 -1.333, rotation -180 60 -180
  bounding box size 3.19591 0.333333 4.86881
  cross sections:
    n  XDelta    YDelta  ZDelta  shape
    0  0         0       0       point
    1  0.22807   0       0       ellipse Ellipse_Height=0.666667 Ellipse_Width=0.333333
    2  4.94536   0       0       as above
    3  0.333333  0       0       point

Stack "LG rear", child of "LG front"
  location (X Y Z) 20.0003 4 -0.666333, rotation -160 -90 0
  symmetric about XZ
  bounding box size 0.666667 12.2655 5.64775
  cross sections:
    n  XDelta   YDelta  ZDelta  shape
    0  0        0       0       point
    1  0        0       0       ellipse Ellipse_Height=0.666667 Ellipse_Width=0.333333
    2  5.66667  0       0       as above
    3  0        0       0       point

Stack "front wheel"
  location (X Y Z) 3.83707 0 -5.76837, rotation 0 0 90
  bounding box size 2 0.581785 1.66667
  cross sections:
    n  XDelta    YDelta  ZDelta  shape
    0  0         0       0       point
    1  0         0       0       circle Circle_Diameter=1.66667
    2  0.333333  0       0       ellipse Ellipse_Height=1.66667 Ellipse_Width=2
    3  0         0       0       point

Stack "rear wheel", child of "front wheel"
  location (X Y Z) 20.0003 5.6612 -5.67314, rotation 0 0 90
  symmetric about XZ
  bounding box size 2 12.2375 1.66667
  cross sections:
    n  XDelta    YDelta  ZDelta  shape
    0  0         0       0       point
    1  0         0       0       circle Circle_Diameter=1.66667
    2  0.333333  0       0       ellipse Ellipse_Height=1.66667 Ellipse_Width=2
    3  0         0       0       point

Pod "Cabin"
  location (X Y Z) 17 0 2, rotation -180 10 -180
  bounding box size 11.8177 4.8 5.75498
  Design: FineRatio=5 Length=12

Pod "wing pods IB"
  location (X Y Z) 13.2337 13.3333 0.000333333, rotation 0 0 0
  symmetric about XZ
  bounding box size 5 27.3333 0.666667
  Design: FineRatio=15 Length=5

Pod "wing pods IMB", child of "wing pods IB"
  location (X Y Z) 13.8337 16.6667 0.287, rotation 0 0 0
  symmetric about XZ
  bounding box size 5 34 0.666667
  Design: FineRatio=15 Length=5

Pod "wing pods MB", child of "wing pods IMB"
  location (X Y Z) 14.367 20 0.567, rotation 0 0 0
  symmetric about XZ
  bounding box size 5 40.6667 0.666667
  Design: FineRatio=15 Length=5

Pod "wing pods OB", child of "wing pods MB"
  location (X Y Z) 15.0337 23.3333 0.853667, rotation 0 0 0
  symmetric about XZ
  bounding box size 5 47.3333 0.666667
  Design: FineRatio=15 Length=5

Pod "wing pods IIB", child of "wing pods OB"
  location (X Y Z) 12.5003 10 -0.293, rotation 0 0 0
  symmetric about XZ
  bounding box size 5 20.6667 0.666667
  Design: FineRatio=15 Length=5

Propeller "Prop IIB"
  location (X Y Z) 13.167 10 -0.293, rotation 0 0 0
  symmetric about XZ
  bounding box size 0.165656 23.3393 2.99516
  Design: Diameter=3.33333 NumBlade=6 Beta34=20 UseBeta34Flag=1 Feather=0 Rotate=0 Precone=0 ReverseFlag=0 FoldAngle=0 PropMode=0 AF=151.538 CLi=0.538798 Chord=0.177656 Solidity=0.339298 ConstructXoC=0.5 FeatherAxisXoC=0.5 FeatherOffsetXoC=0
  cross sections:
    n  RadiusFrac  shape
    0  0.2         ellipse Ellipse_Height=0.0666667 Ellipse_Width=0.133333
    1  0.4         NACA 16-series Chord=0.277083 IdealCl=0.7 ThickChord=0.144074
    2  1           NACA 16-series Chord=0.216667 IdealCl=0.2 ThickChord=0.03
  Chord along r/R (cubic Bezier): 0.2: 0.08, 0.333333: 0.15, 0.466667: 0.2, 0.6: 0.2, 0.716667: 0.2, 0.833333: 0.2, 0.95: 0.2, 0.966667: 0.2, 0.983333: 0.2, 1: 0.13
  Twist along r/R (PCHIP): 0.2: 46.75, 0.75: 20, 1: 13
  Thick along r/R (cubic Bezier): 0.2: 0.5, 0.233333: 0.3, 0.266667: 0.225, 0.3: 0.2, 0.4: 0.125, 0.5: 0.115, 0.6: 0.1, 0.733333: 0.075, 0.866667: 0.055, 1: 0.03
  CLI along r/R (cubic Bezier): 0.2: 0, 0.266667: 0.7, 0.333333: 0.7, 0.4: 0.7, 0.466667: 0.7, 0.533333: 0.7, 0.6: 0.7, 0.733333: 0.7, 0.866667: 0.7, 1: 0.2

Propeller "Prop IB", child of "Prop IIB"
  location (X Y Z) 13.9003 13.3333 0.000333333, rotation 0 0 0
  symmetric about XZ
  bounding box size 0.165656 30.006 2.99516
  Design: Diameter=3.33333 NumBlade=6 Beta34=20 UseBeta34Flag=1 Feather=0 Rotate=0 Precone=0 ReverseFlag=0 FoldAngle=0 PropMode=0 AF=151.538 CLi=0.538798 Chord=0.177656 Solidity=0.339298 ConstructXoC=0.5 FeatherAxisXoC=0.5 FeatherOffsetXoC=0
  cross sections:
    n  RadiusFrac  shape
    0  0.2         ellipse Ellipse_Height=0.0666667 Ellipse_Width=0.133333
    1  0.4         NACA 16-series Chord=0.277083 IdealCl=0.7 ThickChord=0.144074
    2  1           NACA 16-series Chord=0.216667 IdealCl=0.2 ThickChord=0.03
  blade curves as in "Prop IIB"

Propeller "Prop IMB", child of "Prop IIB"
  location (X Y Z) 14.5003 16.6667 0.287, rotation 0 0 0
  symmetric about XZ
  bounding box size 0.165656 36.6727 2.99516
  Design: Diameter=3.33333 NumBlade=6 Beta34=20 UseBeta34Flag=1 Feather=0 Rotate=0 Precone=0 ReverseFlag=0 FoldAngle=0 PropMode=0 AF=151.538 CLi=0.538798 Chord=0.177656 Solidity=0.339298 ConstructXoC=0.5 FeatherAxisXoC=0.5 FeatherOffsetXoC=0
  cross sections:
    n  RadiusFrac  shape
    0  0.2         ellipse Ellipse_Height=0.0666667 Ellipse_Width=0.133333
    1  0.4         NACA 16-series Chord=0.277083 IdealCl=0.7 ThickChord=0.144074
    2  1           NACA 16-series Chord=0.216667 IdealCl=0.2 ThickChord=0.03
  blade curves as in "Prop IIB"

Propeller "Prop MB", child of "Prop IIB"
  location (X Y Z) 15.0337 20 0.567, rotation 0 0 0
  symmetric about XZ
  bounding box size 0.165656 43.3393 2.99516
  Design: Diameter=3.33333 NumBlade=6 Beta34=20 UseBeta34Flag=1 Feather=0 Rotate=0 Precone=0 ReverseFlag=0 FoldAngle=0 PropMode=0 AF=151.538 CLi=0.538798 Chord=0.177656 Solidity=0.339298 ConstructXoC=0.5 FeatherAxisXoC=0.5 FeatherOffsetXoC=0
  cross sections:
    n  RadiusFrac  shape
    0  0.2         ellipse Ellipse_Height=0.0666667 Ellipse_Width=0.133333
    1  0.4         NACA 16-series Chord=0.277083 IdealCl=0.7 ThickChord=0.144074
    2  1           NACA 16-series Chord=0.216667 IdealCl=0.2 ThickChord=0.03
  blade curves as in "Prop IIB"

Propeller "Prop OB", child of "Prop IIB"
  location (X Y Z) 15.7003 23.3333 0.853667, rotation 0 0 0
  symmetric about XZ
  bounding box size 0.165656 50.006 2.99516
  Design: Diameter=3.33333 NumBlade=6 Beta34=20 UseBeta34Flag=1 Feather=0 Rotate=0 Precone=0 ReverseFlag=0 FoldAngle=0 PropMode=0 AF=151.538 CLi=0.538798 Chord=0.177656 Solidity=0.339298 ConstructXoC=0.5 FeatherAxisXoC=0.5 FeatherOffsetXoC=0
  cross sections:
    n  RadiusFrac  shape
    0  0.2         ellipse Ellipse_Height=0.0666667 Ellipse_Width=0.133333
    1  0.4         NACA 16-series Chord=0.277083 IdealCl=0.7 ThickChord=0.144074
    2  1           NACA 16-series Chord=0.216667 IdealCl=0.2 ThickChord=0.03
  blade curves as in "Prop IIB"

Stack "Twin booom"
  location (X Y Z) 16.667 8 -0.333, rotation 0 0 0
  symmetric about XZ
  bounding box size 18 17 1
  cross sections:
    n  XDelta    YDelta  ZDelta  shape
    0  0         0       0       point
    1  0.666667  0       0       circle Circle_Diameter=1
    2  16.6667   0       0       as above
    3  0.666667  0       0       point

Wing "Twin Vstab Tail", child of "Twin booom"
  location (X Y Z) 31.3337 8 -2.66633, rotation 90 0 0
  symmetric about XZ
  bounding box size 6.349 16.5003 9.33333
  totals: TotalSpan=18.6667 TotalProjectedSpan=18.6667 TotalChord=3.90278 TotalArea=71.6296 TotalAR=4.86453
  root: chord 3.11111, twist 0, NACA 4-series Camber=0 CamberLoc=0.2 ThickChord=0.12
  sections:
    n  Span     Root_Chord  Tip_Chord  Area     Sweep  Sweep_Location  Dihedral  Twist  Twist_Location  tip airfoil
    1  2.66667  3.11111     5          10.8148  -30    0               0         0      0.25            NACA 4-series Camber=0 CamberLoc=0.2 ThickChord=0.1
    2  6.66667  5           2.5        25       30     0               0         0      0.25            as above
  SS_Rectangle "SS_RECT_0": Center_U=0.6 Center_W=0.117073 U_Length=0.15 W_Length=0.2

Wing "Box Wing", child of "Twin Vstab Tail"
  location (X Y Z) 33.667 8 6.667, rotation 0 0 0
  symmetric about XZ
  bounding box size 13.9164 53.7282 2.51864
  totals: TotalSpan=38 TotalProjectedSpan=37.7282 TotalChord=2.5 TotalArea=95 TotalAR=14.9833
  root: chord 2.5, twist 0, NACA 4-series Camber=0 CamberLoc=0.2 ThickChord=0.1
  sections:
    n  Span  Root_Chord  Tip_Chord  Area  Sweep  Sweep_Location  Dihedral  Twist  Twist_Location  tip airfoil
    1  19    2.5         2.5        47.5  -31    0               -6.85714  0      0.25            as above

Wing "H Stab", child of "Box Wing"
  location (X Y Z) 33.667 0 6.667, rotation 0 0 0
  symmetric about XZ
  bounding box size 4 16 0.400232
  totals: TotalSpan=16 TotalProjectedSpan=16 TotalChord=4 TotalArea=64 TotalAR=4
  root: chord 4, twist 0, NACA 4-series Camber=0 CamberLoc=0.2 ThickChord=0.1
  sections:
    n  Span  Root_Chord  Tip_Chord  Area  Sweep  Sweep_Location  Dihedral  Twist  Twist_Location  tip airfoil
    1  8     4           4          32    0      0               0         0      0.25            as above
  SS_Rectangle "SS_RECT_0": Center_U=0.480392 Center_W=1 U_Length=0.308824 W_Length=0.5

Wing "Canard Box", child of "H Stab"
  location (X Y Z) 4.667 10 -1.333, rotation 0 0 0
  symmetric about XZ
  bounding box size 20 51.7262 2.42195
  totals: TotalSpan=32 TotalProjectedSpan=31.7262 TotalChord=3.33333 TotalArea=106.667 TotalAR=9.43644
  root: chord 2.66667, twist 0, NACA 4-series Camber=0 CamberLoc=0.2 ThickChord=0.1
  sections:
    n  Span  Root_Chord  Tip_Chord  Area     Sweep  Sweep_Location  Dihedral  Twist  Twist_Location  tip airfoil
    1  16    2.66667     4          53.3333  45     0               7.5       0      0.25            as above

Wing "Main Wing"
  location (X Y Z) 13.5 0 -0.666, rotation 0 0 0
  symmetric about XZ
  bounding box size 8.59505 52 2.20985
  totals: TotalSpan=52.0714 TotalProjectedSpan=52 TotalChord=6 TotalArea=312.428 TotalAR=8.65479
  root: chord 8, twist 0, NACA 5-digit CamberLoc=0.15 IdealCl=0.25 ThickChord=0.18
  sections:
    n  Span     Root_Chord  Tip_Chord  Area     Sweep  Sweep_Location  Dihedral  Twist  Twist_Location  tip airfoil
    1  26.0357  8           4          156.214  10     0               3         -3     0.25            NACA 4-series Camber=0 CamberLoc=0.2 ThickChord=0.1
  SS_Rectangle "SS_RECT_0": Center_U=0.495098 Center_W=0.931373 U_Length=0.102941 W_Length=0.15
  SS_Rectangle "SS_RECT_1": Center_U=0.397059 Center_W=0.931373 U_Length=0.0490196 W_Length=0.15
  SS_Rectangle "SS_RECT_2": Center_U=0.605 Center_W=0.926471 U_Length=0.117647 W_Length=0.15

Propeller "PropGeom"
  location (X Y Z) 1.20252 0 -0.595295, rotation 120 0 180
  bounding box size 0.447272 9.01622 8.08694
  Design: Diameter=9 NumBlade=6 Beta34=20 UseBeta34Flag=1 Feather=0 Rotate=0 Precone=0 ReverseFlag=0 FoldAngle=0 PropMode=0 AF=151.538 CLi=0.538798 Chord=0.177656 Solidity=0.339298 ConstructXoC=0.5 FeatherAxisXoC=0.5 FeatherOffsetXoC=0
  cross sections:
    n  RadiusFrac  shape
    0  0.2         ellipse Ellipse_Height=0.18 Ellipse_Width=0.36
    1  0.4         NACA 16-series Chord=0.748125 IdealCl=0.7 ThickChord=0.144074
    2  1           NACA 16-series Chord=0.585 IdealCl=0.2 ThickChord=0.03
  blade curves as in "Prop IIB"

Ellipsoid "Engine Block"
  location (X Y Z) 0.688739 0 -0.789522, rotation 0 0 0
  bounding box size 5 2 2
  Design: A_Radius=2.5 B_Radius=1 C_Radius=1

Custom "Battery Box"
  location (X Y Z) 11.689 -0.978261 -2.20257, rotation 0 0 0
  symmetric about XZ
  bounding box size 3.5 2.70652 1
  Design: Height=1 Length=3.5 SquareFlag=0 Width=0.75
  custom script Box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

Custom "Fuel Tank"
  location (X Y Z) 14.7105 4.13043 -0.463435, rotation 3 0 -10
  symmetric about XZ
  bounding box size 5.31415 14.669 0.673229
  Design: Height=0.3 Length=4.25 SquareFlag=0 Width=6.5
  custom script Box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

Wing "Shark Fin"
  location (X Y Z) 16.667 0 1.667, rotation 90 0 0
  bounding box size 12.3923 0.800464 18
  totals: TotalSpan=18 TotalProjectedSpan=18 TotalChord=5 TotalArea=90 TotalAR=3.6
  root: chord 8, twist 0, NACA 4-series Camber=0 CamberLoc=0.2 ThickChord=0.1
  sections:
    n  Span  Root_Chord  Tip_Chord  Area  Sweep  Sweep_Location  Dihedral  Twist  Twist_Location  tip airfoil
    1  18    8           2          90    30     0               0         0      0.25            as above

Human "Timothy the 2nd"
  location (X Y Z) 12.4279 0 1.2757, rotation 0 15 0
  mass: Density=69.4226 Shell_Flag=0 Mass_Area=1 Mass_Prior=0
  Anthropometric: Age=30 AutoDensity=1 BMI=23.5362 BMI_pct=0.183044 GenderFlag=0 LenUnit=4 Mass=160 MassUnit=3 SitFrac=0.5 Stature=5.76115 Stature_pct=0.5 Volume=2.30473

Custom "Seat", child of "Timothy the 2nd"
  location (X Y Z) 11.9931 -0.108696 0.417, rotation 0 -90 0
  bounding box size 2.22093 1.38496 2.85669
  Design: BackAngle=16 BackHeight=2.80075 BackThick=0.138714 SeatHeight=0.0950818 SeatLength=1.38496 Width=1.38496
  custom script Seat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

Box "Box"
  location (X Y Z) 18.3696 14.6196 0.108696, rotation 3 0 -5.1087
  symmetric about XZ
  bounding box size 2.3845 39.2015 0.82786
  Design: Height=0.3 Length=1.5 SquareFlag=0 Width=10
  custom script Box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
