OpenVSP model (file version 5), 3 components.
Geometry view with OpenVSP parameter names; values to 6 digits, angles in degrees, lengths in the model's unit.
Overall bounding box: X_Min=-0.00341591 X_Len=28.0034 Y_Min=-29.9091 Y_Len=59.8183 Z_Min=-0.286511 Z_Len=8.28651

Wing "Wings"
  location (X Y Z) 0 0 0, rotation 0 0 0
  symmetric about XZ
  bounding box size 6.83675 59.8183 2.44567
  totals: TotalSpan=59.25 TotalProjectedSpan=59.1395 TotalChord=6.83333 TotalArea=404.875 TotalAR=8.63842
  root: chord 6.83333, twist 0, NACA 4-series Camber=0.04 CamberLoc=0.4 ThickChord=0.15
  sections:
    n  Span    Root_Chord  Tip_Chord  Area     Sweep  Sweep_Location  Dihedral  Twist  Twist_Location  tip airfoil
    1  29.625  6.83333     6.83333    202.437  0      0               3.5       0      0.25            NACA 4-series Camber=0 CamberLoc=0.2 ThickChord=0.1

Wing "H Stab"
  location (X Y Z) 23 0 2, rotation 0 0 0
  symmetric about XZ
  bounding box size 4.002 19.6667 0.654934
  mass: Density=1 Shell_Flag=1 Mass_Area=1 Mass_Prior=0
  totals: TotalSpan=19.6667 TotalProjectedSpan=19.6667 TotalChord=4 TotalArea=78.6667 TotalAR=4.91667
  root: chord 4, twist 0, NACA 4-series Camber=0.04 CamberLoc=0.4 ThickChord=0.15
  sections:
    n  Span     Root_Chord  Tip_Chord  Area     Sweep  Sweep_Location  Dihedral  Twist  Twist_Location  tip airfoil
    1  9.83333  4           4          39.3333  0      0               0         0      0.25            NACA 4-series Camber=0 CamberLoc=0.2 ThickChord=0.1

Wing "V Stab"
  location (X Y Z) 23 0 2, rotation 90 0 0
  bounding box size 5 0.750325 6
  totals: TotalSpan=6 TotalProjectedSpan=6 TotalChord=4 TotalArea=24 TotalAR=1.5
  root: chord 5, twist 0, NACA 4-series Camber=0 CamberLoc=0.2 ThickChord=0.15
  sections:
    n  Span  Root_Chord  Tip_Chord  Area  Sweep  Sweep_Location  Dihedral  Twist  Twist_Location  tip airfoil
    1  6     5           3          24    15     0               0         0      0.25            NACA 4-series Camber=0 CamberLoc=0.2 ThickChord=0.1
