OpenVSP model (file version 5), 6 components.
Geometry view with OpenVSP parameter names; values to 6 digits, angles in degrees, lengths in the model's unit.
Overall bounding box: X_Min=-0.729756 X_Len=36.4299 Y_Min=-29.9091 Y_Len=59.8183 Z_Min=-5.50117 Z_Len=10.3045

Wing "Wings"
  location (X Y Z) 11.6393 0 -3.36066, rotation 0 8.56557 0
  symmetric about XZ
  bounding box size 7.02673 59.8183 2.97599
  totals: TotalSpan=59.25 TotalProjectedSpan=59.1395 TotalChord=6.83333 TotalArea=404.875 TotalAR=8.63842 MAC=6.83333
  root: chord 6.83333, twist 0, NACA 4-series Camber=0.04 CamberLoc=0.4 ThickChord=0.15
  sections:
    n  Span    Root_Chord  Tip_Chord  Area     Sweep  Sweep_Location  Dihedral  Twist  Twist_Location  tip airfoil
    1  29.625  6.83333     6.83333    202.437  0      0               3.5       0      0.25            NACA 4-series Camber=0 CamberLoc=0.2 ThickChord=0.1

Wing "H Stab"
  location (X Y Z) 31.6066 0 -4.72131, rotation 0 0 0
  symmetric about XZ
  bounding box size 4.002 19.6667 0.654934
  mass: Density=1 Shell_Flag=1 Mass_Area=1 Mass_Prior=0
  totals: TotalSpan=19.6667 TotalProjectedSpan=19.6667 TotalChord=4 TotalArea=78.6667 TotalAR=4.91667 MAC=4
  root: chord 4, twist 0, NACA 4-series Camber=0.04 CamberLoc=0.4 ThickChord=0.15
  sections:
    n  Span     Root_Chord  Tip_Chord  Area     Sweep  Sweep_Location  Dihedral  Twist  Twist_Location  tip airfoil
    1  9.83333  4           4          39.3333  0      0               0         0      0.25            NACA 4-series Camber=0 CamberLoc=0.2 ThickChord=0.1

Propeller "PropGeom", child of "H Stab"
  location (X Y Z) 0 0 0, rotation 0 7.4 0
  bounding box size 1.45772 9.25107 9.60663
  Design: Diameter=10 NumBlade=5 Beta34=20 UseBeta34Flag=1 Feather=0 Rotate=0 Precone=0 ReverseFlag=0 FoldAngle=0 PropMode=0 AF=151.538 CLi=0.538798 Chord=0.177656 Solidity=0.282749 ConstructXoC=0.5 FeatherAxisXoC=0.5 FeatherOffsetXoC=0
  cross sections:
    n  RadiusFrac  shape
    0  0.2         ellipse Ellipse_Height=0.2 Ellipse_Width=0.4
    1  0.4         NACA 16-series Chord=0.83125 IdealCl=0.7 ThickChord=0.144074
    2  1           NACA 16-series Chord=0.65 IdealCl=0.2 ThickChord=0.03
  Chord along r/R (cubic Bezier): 0.2: 0.08, 0.333333: 0.15, 0.466667: 0.2, 0.6: 0.2, 0.716667: 0.2, 0.833333: 0.2, 0.95: 0.2, 0.966667: 0.2, 0.983333: 0.2, 1: 0.13
  Twist along r/R (PCHIP): 0.2: 46.75, 0.75: 20, 1: 13
  Thick along r/R (cubic Bezier): 0.2: 0.5, 0.233333: 0.3, 0.266667: 0.225, 0.3: 0.2, 0.4: 0.125, 0.5: 0.115, 0.6: 0.1, 0.733333: 0.075, 0.866667: 0.055, 1: 0.03
  CLI along r/R (cubic Bezier): 0.2: 0, 0.266667: 0.7, 0.333333: 0.7, 0.4: 0.7, 0.466667: 0.7, 0.533333: 0.7, 0.6: 0.7, 0.733333: 0.7, 0.866667: 0.7, 1: 0.2

Wing "V Stab"
  location (X Y Z) 30.623 0 -4.72131, rotation 90 0 0
  bounding box size 5 0.750325 6
  totals: TotalSpan=6 TotalProjectedSpan=6 TotalChord=4 TotalArea=24 TotalAR=1.5 MAC=4.08333
  root: chord 5, twist 0, NACA 4-series Camber=0 CamberLoc=0.2 ThickChord=0.15
  sections:
    n  Span  Root_Chord  Tip_Chord  Area  Sweep  Sweep_Location  Dihedral  Twist  Twist_Location  tip airfoil
    1  6     5           3          24    15     0               0         0      0.25            NACA 4-series Camber=0 CamberLoc=0.2 ThickChord=0.1

Fuselage "FuselageGeom"
  location (X Y Z) 0 0 0, rotation 0 7.4 0
  bounding box size 35.7002 4.95981 8.45891
  Design: Length=36
  cross sections:
    n   XLocPercent  YLocPercent  ZLocPercent  shape
    0   0            0            0            point
    1   0.0803484    0            0            ellipse Ellipse_Height=3.27476 Ellipse_Width=2.5
    2   0.263287     0            0            ellipse Ellipse_Height=5.10452 Ellipse_Width=4.59184
    3   0.4394       0            0.00819672   ellipse Ellipse_Height=6.34004 Ellipse_Width=4.84694
    4   0.504485     0            0.0327869    ellipse Ellipse_Height=7.81223 Ellipse_Width=4.7147
    5   0.562506     0            0.0360656    ellipse Ellipse_Height=7.2043 Ellipse_Width=4.29591
    6   0.597207     0            0.0280328    ellipse Ellipse_Height=6.7808 Ellipse_Width=4.06664
    7   0.651433     0            0.00819672   ellipse Ellipse_Height=5.13724 Ellipse_Width=3.67847
    8   0.799062     0            0.00819672   ellipse Ellipse_Height=3.57905 Ellipse_Width=2.49584
    9   0.90154      0            0.00819672   ellipse Ellipse_Height=3.03433 Ellipse_Width=1.34944
    10  1            0            0            point

Stack "StackGeom"
  location (X Y Z) -0.245902 0 0.0819672, rotation 0 10 0
  bounding box size 4.15629 1 2.46202
  cross sections:
    n  XDelta  YDelta  ZDelta  shape
    0  0       0       0       point
    1  1       0       0       ellipse Ellipse_Height=1.12245 Ellipse_Width=1
    2  2       0       0       ellipse Ellipse_Height=1.12 Ellipse_Width=1
    3  1       0       0       ellipse Ellipse_Height=2.5 Ellipse_Width=1
