OpenVSP model (file version 5), 25 components.
Geometry view with OpenVSP parameter names; values to 6 digits, angles in degrees, lengths in the model's unit.
Overall bounding box: X_Min=-10 X_Len=53.9641 Y_Min=-41.2839 Y_Len=82.5678 Z_Min=-5.25 Z_Len=17.25

Wing "Canard"
  location (X Y Z) -3 0 0, rotation 0 0 0
  symmetric about XZ
  bounding box size 4 30 0.480217
  totals: TotalSpan=30 TotalProjectedSpan=30 TotalChord=4 TotalArea=120 TotalAR=7.5
  root: chord 4, twist 0, NACA 4-series Camber=0 CamberLoc=0.2 ThickChord=0.12
  sections:
    n  Span  Root_Chord  Tip_Chord  Area  Sweep  Sweep_Location  Dihedral  Twist  Twist_Location  tip airfoil
    1  15    4           4          60    0      0               0         0      0.25            NACA 4-series Camber=0 CamberLoc=0.2 ThickChord=0.1

Wing "Main Wing"
  location (X Y Z) 8.31 3.25 2, rotation 0 0 0
  symmetric about XZ
  bounding box size 20.0383 79.7203 3.36758
  totals: TotalSpan=73.5 TotalProjectedSpan=73.2203 TotalChord=8.8125 TotalArea=534.375 TotalAR=10.0327
  root: chord 15, twist 2, NACA 5-digit CamberLoc=0.15 IdealCl=0.23 ThickChord=0.12
  sections:
    n  Span  Root_Chord  Tip_Chord  Area     Sweep  Sweep_Location  Dihedral  Twist  Twist_Location  tip airfoil
    1  6.75  15          7.5        75.9375  45     0               -5        0      0.25            as above
    2  30    7.5         5.25       191.25   15     0               5         -2     0.25            as above

Fuselage "Fuselage"
  location (X Y Z) -10 0 2, rotation 0 0 0
  bounding box size 40 8 11.3158
  Design: Length=40
  cross sections:
    n  XLocPercent  YLocPercent  YRotate  ZLocPercent  shape
    0  0            0            0        -0.025       point
    1  0.5          0            -15      -0.0075      ellipse Ellipse_Height=8 Ellipse_Width=8
    2  1            0            0        0            point

Wing "Canard Winglet"
  location (X Y Z) -3 14.85 0, rotation 45 0 0
  symmetric about XZ
  bounding box size 4 31.9628 1.30119
  totals: TotalSpan=3 TotalProjectedSpan=3 TotalChord=3 TotalArea=9 TotalAR=1
  root: chord 4, twist 0, NACA 4-series Camber=0 CamberLoc=0.2 ThickChord=0.12
  sections:
    n  Span  Root_Chord  Tip_Chord  Area  Sweep  Sweep_Location  Dihedral  Twist  Twist_Location  tip airfoil
    1  1.5   4           2          4.5   30     0               0         0      0.25            NACA 4-series Camber=0 CamberLoc=0.2 ThickChord=0.1

Wing "Main Winglet"
  location (X Y Z) 24.6 40.9 0.17, rotation 90 0 0
  symmetric about XZ
  bounding box size 5.38675 82.5678 8.69333
  totals: TotalSpan=18 TotalProjectedSpan=17.3867 TotalChord=3.95833 TotalArea=70.8333 TotalAR=4.26771
  root: chord 3.33333, twist 0, NACA 4-series Camber=0 CamberLoc=0.2 ThickChord=0.12
  sections:
    n  Span  Root_Chord  Tip_Chord  Area     Sweep  Sweep_Location  Dihedral  Twist  Twist_Location  tip airfoil
    1  4     3.33333     5          16.6667  -20    0               15        0      0.25            NACA 4-series Camber=0 CamberLoc=0.2 ThickChord=0.1
    2  5     5           2.5        18.75    30     0               -15       0      0.25            as above

Stack "LG front"
  location (X Y Z) -0.6 0.75 0, rotation 0 120 0
  bounding box size 3.33485 0.5 4.77613
  cross sections:
    n  XDelta    YDelta  ZDelta  shape
    0  0         0       0       point
    1  0.342105  0       0       ellipse Ellipse_Height=1 Ellipse_Width=0.5
    2  4.5       0       0       as above
    3  0.5       0       0       point

Stack "LG rear", child of "LG front"
  location (X Y Z) 20 6 1, rotation -160 -90 0
  symmetric about XZ
  bounding box size 1 16.3461 5.65255
  cross sections:
    n  XDelta  YDelta  ZDelta  shape
    0  0       0       0       point
    1  0       0       0       ellipse Ellipse_Height=1 Ellipse_Width=0.5
    2  5.5     0       0       as above
    3  0       0       0       point

Stack "front wheel"
  location (X Y Z) -3 0 -4, rotation 0 0 90
  bounding box size 3 0.872678 2.5
  cross sections:
    n  XDelta  YDelta  ZDelta  shape
    0  0       0       0       point
    1  0       0       0       circle Circle_Diameter=2.5
    2  0.5     0       0       ellipse Ellipse_Height=2.5 Ellipse_Width=3
    3  0       0       0       point

Stack "rear wheel", child of "front wheel"
  location (X Y Z) 20 8 -4, rotation 0 0 90
  symmetric about XZ
  bounding box size 3 17.3727 2.5
  cross sections:
    n  XDelta  YDelta  ZDelta  shape
    0  0       0       0       point
    1  0       0       0       circle Circle_Diameter=2.5
    2  0.5     0       0       ellipse Ellipse_Height=2.5 Ellipse_Width=3
    3  0       0       0       point

Pod "Cabin"
  location (X Y Z) 14 0 5, rotation 0 170 0
  bounding box size 14.7721 6 7.19372
  Design: FineRatio=5 Length=15

Pod "wing pods IB"
  location (X Y Z) 14.6 20 2, rotation 0 0 0
  symmetric about XZ
  bounding box size 10 41.3333 1.33333
  Design: FineRatio=15 Length=10

Pod "wing pods IMB", child of "wing pods IB"
  location (X Y Z) 15.5 25 2.43, rotation 0 0 0
  symmetric about XZ
  bounding box size 10 51.3333 1.33333
  Design: FineRatio=15 Length=10

Pod "wing pods MB", child of "wing pods IMB"
  location (X Y Z) 16.3 30 2.85, rotation 0 0 0
  symmetric about XZ
  bounding box size 10 61.3333 1.33333
  Design: FineRatio=15 Length=10

Pod "wing pods OB", child of "wing pods MB"
  location (X Y Z) 17.3 35 3.28, rotation 0 0 0
  symmetric about XZ
  bounding box size 10 71.3333 1.33333
  Design: FineRatio=15 Length=10

Pod "wing pods IIB", child of "wing pods OB"
  location (X Y Z) 13.5 15 1.56, rotation 0 0 0
  symmetric about XZ
  bounding box size 10 31.3333 1.33333
  Design: FineRatio=15 Length=10

Propeller "Prop IIB"
  location (X Y Z) 14.5 15 1.56, rotation 0 0 0
  symmetric about XZ
  bounding box size 0.248485 35.009 4.49274
  Design: Diameter=5 NumBlade=6 Beta34=20 UseBeta34Flag=1 Feather=0 Rotate=0 Precone=0 ReverseFlag=0 FoldAngle=0 PropMode=0 AF=151.538 CLi=0.538798 Chord=0.177656 Solidity=0.339298 ConstructXoC=0.5 FeatherAxisXoC=0.5 FeatherOffsetXoC=0
  cross sections:
    n  RadiusFrac  shape
    0  0.2         ellipse Ellipse_Height=0.1 Ellipse_Width=0.2
    1  0.4         NACA 16-series Chord=0.415625 IdealCl=0.7 ThickChord=0.144074
    2  1           NACA 16-series Chord=0.325 IdealCl=0.2 ThickChord=0.03
  Chord along r/R (cubic Bezier): 0.2: 0.08, 0.333333: 0.15, 0.466667: 0.2, 0.6: 0.2, 0.716667: 0.2, 0.833333: 0.2, 0.95: 0.2, 0.966667: 0.2, 0.983333: 0.2, 1: 0.13
  Twist along r/R (PCHIP): 0.2: 46.75, 0.75: 20, 1: 13
  Thick along r/R (cubic Bezier): 0.2: 0.5, 0.233333: 0.3, 0.266667: 0.225, 0.3: 0.2, 0.4: 0.125, 0.5: 0.115, 0.6: 0.1, 0.733333: 0.075, 0.866667: 0.055, 1: 0.03
  CLI along r/R (cubic Bezier): 0.2: 0, 0.266667: 0.7, 0.333333: 0.7, 0.4: 0.7, 0.466667: 0.7, 0.533333: 0.7, 0.6: 0.7, 0.733333: 0.7, 0.866667: 0.7, 1: 0.2

Propeller "Prop IB", child of "Prop IIB"
  location (X Y Z) 15.6 20 2, rotation 0 0 0
  symmetric about XZ
  bounding box size 0.248485 45.009 4.49274
  Design: Diameter=5 NumBlade=6 Beta34=20 UseBeta34Flag=1 Feather=0 Rotate=0 Precone=0 ReverseFlag=0 FoldAngle=0 PropMode=0 AF=151.538 CLi=0.538798 Chord=0.177656 Solidity=0.339298 ConstructXoC=0.5 FeatherAxisXoC=0.5 FeatherOffsetXoC=0
  cross sections:
    n  RadiusFrac  shape
    0  0.2         ellipse Ellipse_Height=0.1 Ellipse_Width=0.2
    1  0.4         NACA 16-series Chord=0.415625 IdealCl=0.7 ThickChord=0.144074
    2  1           NACA 16-series Chord=0.325 IdealCl=0.2 ThickChord=0.03
  blade curves as in "Prop IIB"

Propeller "Prop IMB", child of "Prop IIB"
  location (X Y Z) 16.5 25 2.43, rotation 0 0 0
  symmetric about XZ
  bounding box size 0.248485 55.009 4.49274
  Design: Diameter=5 NumBlade=6 Beta34=20 UseBeta34Flag=1 Feather=0 Rotate=0 Precone=0 ReverseFlag=0 FoldAngle=0 PropMode=0 AF=151.538 CLi=0.538798 Chord=0.177656 Solidity=0.339298 ConstructXoC=0.5 FeatherAxisXoC=0.5 FeatherOffsetXoC=0
  cross sections:
    n  RadiusFrac  shape
    0  0.2         ellipse Ellipse_Height=0.1 Ellipse_Width=0.2
    1  0.4         NACA 16-series Chord=0.415625 IdealCl=0.7 ThickChord=0.144074
    2  1           NACA 16-series Chord=0.325 IdealCl=0.2 ThickChord=0.03
  blade curves as in "Prop IIB"

Propeller "Prop MB", child of "Prop IIB"
  location (X Y Z) 17.3 30 2.85, rotation 0 0 0
  symmetric about XZ
  bounding box size 0.248485 65.009 4.49274
  Design: Diameter=5 NumBlade=6 Beta34=20 UseBeta34Flag=1 Feather=0 Rotate=0 Precone=0 ReverseFlag=0 FoldAngle=0 PropMode=0 AF=151.538 CLi=0.538798 Chord=0.177656 Solidity=0.339298 ConstructXoC=0.5 FeatherAxisXoC=0.5 FeatherOffsetXoC=0
  cross sections:
    n  RadiusFrac  shape
    0  0.2         ellipse Ellipse_Height=0.1 Ellipse_Width=0.2
    1  0.4         NACA 16-series Chord=0.415625 IdealCl=0.7 ThickChord=0.144074
    2  1           NACA 16-series Chord=0.325 IdealCl=0.2 ThickChord=0.03
  blade curves as in "Prop IIB"

Propeller "Prop OB", child of "Prop IIB"
  location (X Y Z) 18.3 35 3.28, rotation 0 0 0
  symmetric about XZ
  bounding box size 0.248485 75.009 4.49274
  Design: Diameter=5 NumBlade=6 Beta34=20 UseBeta34Flag=1 Feather=0 Rotate=0 Precone=0 ReverseFlag=0 FoldAngle=0 PropMode=0 AF=151.538 CLi=0.538798 Chord=0.177656 Solidity=0.339298 ConstructXoC=0.5 FeatherAxisXoC=0.5 FeatherOffsetXoC=0
  cross sections:
    n  RadiusFrac  shape
    0  0.2         ellipse Ellipse_Height=0.1 Ellipse_Width=0.2
    1  0.4         NACA 16-series Chord=0.415625 IdealCl=0.7 ThickChord=0.144074
    2  1           NACA 16-series Chord=0.325 IdealCl=0.2 ThickChord=0.03
  blade curves as in "Prop IIB"

Stack "Twin booom"
  location (X Y Z) 15 10 1.5, rotation 0 0 0
  symmetric about XZ
  bounding box size 27 21.5 1.5
  cross sections:
    n  XDelta  YDelta  ZDelta  shape
    0  0       0       0       point
    1  1       0       0       circle Circle_Diameter=1.5
    2  25      0       0       circle Circle_Diameter=1
    3  1       0       0       point

Wing "Twin Vstab Tail", child of "Twin booom"
  location (X Y Z) 37 10 -2, rotation 90 0 0
  symmetric about XZ
  bounding box size 9.2735 20.7004 14
  totals: TotalSpan=28 TotalProjectedSpan=28 TotalChord=5.54167 TotalArea=151.667 TotalAR=5.16923
  root: chord 4.66667, twist 0, NACA 4-series Camber=0 CamberLoc=0.2 ThickChord=0.12
  sections:
    n  Span  Root_Chord  Tip_Chord  Area     Sweep  Sweep_Location  Dihedral  Twist  Twist_Location  tip airfoil
    1  4     4.66667     7          23.3333  -30    0               0         0      0.25            NACA 4-series Camber=0 CamberLoc=0.2 ThickChord=0.1
    2  10    7           3.5        52.5     30     0               0         0      0.25            as above

Wing "Twin Hstab Tail", child of "Twin Vstab Tail"
  location (X Y Z) 43.25 15 10, rotation 0 0 180
  symmetric about XZ
  bounding box size 3.75 30 0.375218
  totals: TotalSpan=20 TotalProjectedSpan=20 TotalChord=3.1875 TotalArea=63.75 TotalAR=6.27451
  root: chord 2.625, twist 0, NACA 4-series Camber=0 CamberLoc=0.2 ThickChord=0.12
  sections:
    n  Span  Root_Chord  Tip_Chord  Area     Sweep  Sweep_Location  Dihedral  Twist  Twist_Location  tip airfoil
    1  5     2.625       3.75       15.9375  0      0               0         0      0.25            NACA 4-series Camber=0 CamberLoc=0.2 ThickChord=0.1
    2  5     3.75        2.625      15.9375  0      0               0         0      0.25            as above

Pod "canard pods"
  location (X Y Z) -5 5.5 0, rotation 0 0 0
  symmetric about XZ
  bounding box size 6 12 1
  Design: FineRatio=12 Length=6

Propeller "Prop canard", child of "canard pods"
  location (X Y Z) -4.25 5.5 0, rotation 0 0 0
  symmetric about XZ
  bounding box size 0.198788 15.0072 3.59419
  Design: Diameter=4 NumBlade=6 Beta34=20 UseBeta34Flag=1 Feather=0 Rotate=0 Precone=0 ReverseFlag=0 FoldAngle=0 PropMode=0 AF=151.538 CLi=0.538798 Chord=0.177656 Solidity=0.339298 ConstructXoC=0.5 FeatherAxisXoC=0.5 FeatherOffsetXoC=0
  cross sections:
    n  RadiusFrac  shape
    0  0.2         ellipse Ellipse_Height=0.08 Ellipse_Width=0.16
    1  0.4         NACA 16-series Chord=0.3325 IdealCl=0.7 ThickChord=0.144074
    2  1           NACA 16-series Chord=0.26 IdealCl=0.2 ThickChord=0.03
  blade curves as in "Prop IIB"
