OpenVSP model (file version 5), 6 components.
Geometry view with OpenVSP parameter names; values to 6 digits, angles in degrees, lengths in the model's unit.
Overall bounding box: X_Min=-230 X_Len=306 Y_Min=-228.502 Y_Len=457.003 Z_Min=-34.9274 Z_Len=108.111

Wing "WingGeom"
  location (X Y Z) 0 0 0, rotation 0 0 0
  symmetric about XZ
  bounding box size 76.5455 457.003 62.2522
  totals: TotalSpan=465 TotalProjectedSpan=457.003 TotalChord=65 TotalArea=30606.3 TotalAR=6.82382 MAC=66.103
  root: chord 71.6094, twist 0, NACA 5-digit modified CamberLoc=0.15 IdealCl=0.3 LERadIndx=6 Theta=180 ThickChord=0.15 ThickLoc=0.3
  sections:
    n  Span     Root_Chord  Tip_Chord  Area     Sweep     Sweep_Location  Dihedral  Twist    Twist_Location  tip airfoil
    1  29.0581  71.6094     75.1881    2132.83  -2.52669  0               5         0        0.25            as above
    2  35.8223  75.1881     64.452     2501.12  -14.7331  0               5         0        0.25            as above
    3  64.8804  64.452      64.452     4181.68  0         0               5         0        0.25            as above
    4  32.4402  64.452      64.452     2090.84  0         0               5         0        0.25            as above
    5  32.4402  64.452      64.452     2090.84  0         0               5         0        0.25            as above
    6  16.2201  64.452      64.4162    1045.13  0         0               5         0        0.25            as above
    7  8.11006  64.4162     64.4162    522.419  0         0               5         0        0.25            as above
    8  13.5285  64.4162     44.7335    738.316  -60       0               40        31.3879  0.2             as above

Fuselage "FuselageGeom"
  location (X Y Z) -230 0 10, rotation 0 0 0
  bounding box size 293.845 40.7767 75.5
  Design: Length=290
  cross sections:
    n   XLocPercent  YLocPercent  ZLocPercent  shape
    0   0            0            0.0310345    point
    1   0.05         0            0.0310345    ellipse Ellipse_Height=14 Ellipse_Width=5
    2   0.2125       0            0.0258621    ellipse Ellipse_Height=30 Ellipse_Width=15
    3   0.375        0            0.0206897    ellipse Ellipse_Height=38 Ellipse_Width=25
    4   0.5          0            0.0448276    super ellipse Super_Height=65 Super_M=2 Super_MaxWidthLoc=-0.635379 Super_N=2 Super_Width=35
    5   0.56125      0            0.0517241    super ellipse Super_Height=74 Super_M=2 Super_MaxWidthLoc=-0.635379 Super_N=2 Super_Width=40
    6   0.6225       0            0.0189655    rounded rectangle RoundRectXSec_Radius=20 RoundedRect_Height=55 RoundedRect_Width=40
    7   0.653125     0            0.00413793   rounded rectangle RoundRectXSec_Radius=20 RoundedRect_Height=47 RoundedRect_Width=40
    8   0.68375      0            0.00344828   rounded rectangle RoundRectXSec_Radius=20 RoundedRect_Height=46 RoundedRect_Width=40
    9   0.745        0            -0.00344828  rounded rectangle RoundRectXSec_Radius=15 RoundedRect_Height=45 RoundedRect_Width=40
    10  0.99         0            -0.00344828  rounded rectangle RoundRectXSec_Radius=9 RoundedRect_Height=22 RoundedRect_Width=40
    11  1            0            0            point

Wing "WingGeom"
  location (X Y Z) -195 0 70, rotation 0 0 180
  symmetric about XZ
  bounding box size 35.0367 150 5.2881
  totals: TotalSpan=150 TotalProjectedSpan=150 TotalChord=35 TotalArea=5250 TotalAR=4.28571 MAC=35
  root: chord 35, twist 0, NACA 5-digit modified CamberLoc=0.15 IdealCl=0.3 LERadIndx=6 ThickChord=0.15 ThickLoc=0.3
  sections:
    n  Span  Root_Chord  Tip_Chord  Area  Sweep  Sweep_Location  Dihedral  Twist  Twist_Location  tip airfoil
    1  75    35          35         2625  0      0               0         0      0.25            NACA 4-series Camber=0 CamberLoc=0.2 ThickChord=0.1

Custom "Cone"
  location (X Y Z) 58 0 8, rotation 0 0 0
  bounding box size 18 16 16
  Design: Diameter=16 Height=18
  custom script Cone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

Propeller "PropGeom"
  location (X Y Z) 65 0 10, rotation 0 0 0
  bounding box size 4.96969 78.527 89.8548
  Design: Diameter=100 NumBlade=3 Beta34=20 UseBeta34Flag=1 Feather=0 Rotate=0 Precone=0 ReverseFlag=0 FoldAngle=0 PropMode=0 AF=151.538 CLi=0.538798 Chord=0.177656 Solidity=0.169649 ConstructXoC=0.5 FeatherAxisXoC=0.5 FeatherOffsetXoC=0
  cross sections:
    n  RadiusFrac  shape
    0  0.2         ellipse Ellipse_Height=2 Ellipse_Width=4
    1  0.4         NACA 16-series Chord=8.3125 IdealCl=0.7 ThickChord=0.144074
    2  1           NACA 16-series Chord=6.5 IdealCl=0.2 ThickChord=0.03
  Chord along r/R (cubic Bezier): 0.2: 0.08, 0.333333: 0.15, 0.466667: 0.2, 0.6: 0.2, 0.716667: 0.2, 0.833333: 0.2, 0.95: 0.2, 0.966667: 0.2, 0.983333: 0.2, 1: 0.13
  Twist along r/R (PCHIP): 0.2: 46.75, 0.75: 20, 1: 13
  Thick along r/R (cubic Bezier): 0.2: 0.5, 0.233333: 0.3, 0.266667: 0.225, 0.3: 0.2, 0.4: 0.125, 0.5: 0.115, 0.6: 0.1, 0.733333: 0.075, 0.866667: 0.055, 1: 0.03
  CLI along r/R (cubic Bezier): 0.2: 0, 0.266667: 0.7, 0.333333: 0.7, 0.4: 0.7, 0.466667: 0.7, 0.533333: 0.7, 0.6: 0.7, 0.733333: 0.7, 0.866667: 0.7, 1: 0.2

Wing "WingGeom"
  location (X Y Z) -220 0 0, rotation 90 0 0
  symmetric about XZ
  bounding box size 61.4599 12.5052 70
  totals: TotalSpan=140 TotalProjectedSpan=140 TotalChord=41.25 TotalArea=5775 TotalAR=3.39394 MAC=43.7374
  root: chord 25, twist 0, NACA 4-series Camber=0 CamberLoc=0.2 ThickChord=0.5
  sections:
    n  Span  Root_Chord  Tip_Chord  Area    Sweep     Sweep_Location  Dihedral  Twist  Twist_Location  tip airfoil
    1  17.5  25          40         568.75  -4.76868  0               0         0      0.25            NACA 4-series Camber=0 CamberLoc=0.2 ThickChord=0.1
    2  17.5  40          60         875     -4.76868  0               0         0      0.25            as above
    3  17.5  60          40         875     -4.76868  0               0         0      0.25            as above
    4  17.5  40          25         568.75  10        0               0         0      0.25            as above
